# Расчет шнекового конвейера
# Исходные данные
# Материал - Каустическая сода
# Насыпная плотность материала
ρ_н := 2.13  # т/м^3
# Длина конвейера
L := 2
# Угол наклона конвейера
f := 25 deg
# Производительность
Q := 2  # т/ч
# Коэффициент заполнения желоба
φ := 0.25
# Отношение шага винта к диаметру винта
E := 0.8
# Частота вращения винта
n := 30  # об/мин
# Коэффициент уменьшения производительности
# от наклона конвейера
R_β := 0.5
# Коэффициент абразивности
A := 45
# Наибольший размер кусков материала
a_max := 0.015  # м
# Определяем необходимый диаметр винта по формуле:
D := 0.275*Q/(E*n*φ*ρ_н*R_β) explicit, ALL → 0.275*2/(0.8*30*0.25*2.13*0.5) float, 2 → 0.086  # м
# Проверяем частоту вращения:
n_max := A/sqrt(D) explicit, ALL → 45/sqrt(0.086) float, 4 → 153.4  # об/мин
n ≤ n_max explicit, ALL → 30 ≤ 153.4 = 1
# Проверяем диаметр винта:
# Коэффициент для рядового груза
k := 4
D > a_max*k explicit, ALL → 0.086 > 0.015*4 = 1
# Подбираем стандартный диаметр и шаг винта из таблицы
D_ст := 0.09  # м
S_ст := 0.09  # м
# Уточняем частоту оборотов
n_ст := 0.275*Q/(E*D_ст*φ*ρ_н*R_β) explicit, ALL → 0.275*2/(0.8*0.09*0.25*2.13*0.5) float, 4 → 28.69  # об/мин
# Проверяем частоту вращения
n_ст ≤ A/sqrt(D_ст) explicit, ALL → 28.69 ≤ 45/sqrt(0.09) = 1
# Таким образом, допустимая частота вращения винта
n_ст = 28.69  # об/мин
# Определение мощности на валу винта
# Исходные данные
# Горизонтальная проекция длины конвейера
L_г1 := L*cos(f) explicit, ALL → 2*cos(25*deg) = 1.81262  # м
L_г := L_г1 float, 3 → 1.81  # м
# Высота подъема
H_1 := L*sin(f) explicit, ALL → 2*sin(25*deg) = 0.845237  # м
H := H_1 float, 2 → 0.85  # м
# Коэффициент сопротивления перемещению груза
ω := 2.5
# Коэффициент, учитывающий характер перемещения винта
R := 0.2
# Погонная масса вращающихся частей конвейера
g_k := 100*D_ст explicit, ALL → 100*0.09 = 9  # кг/м
# Коэффициент сопротивления движению вращающихся частей конвейера
ω_в := 0.16
# Осевая скорость движения груза
υ := S_ст*n_ст/60 explicit, ALL → 0.09*28.69/60 = 0.043035  # м/с
# Мощность на валу винта:
N_0 := Q/367*(L_г*ω + H) + 0.02*R*g_k*L_г*ω_в explicit, ALL → 2/367*(1.81*2.5 + 0.85) + 0.02*0.2*9*1.81*0.16 float, 2 → 0.04  # кВт
# Определение мощности двигателя для привода шнекового конвейера
# Исходные данные
# Коэффициент запаса мощности для приводов шнеков
K := 1.25
# КПД привода
η := 0.85
# Мощность двигателя:
N := K*N_0/η explicit, ALL → 1.25*0.04/0.85 = 0.0588235  # кВт
