# Расчет шнекового конвейера
# Исходные данные
# Материал - Каустическая сода
# Насыпная плотность материала
ρ_н := 2.13  # т/м^3
# Длина конвейера
L := 2.6  # м
# Угол наклона конвейера
f := 15  # град.
# Производительность
Q := 0.041  # т/ч
# Коэффициент заполнения желоба
φ := 0.32
# Отношение шага винта к диаметру винта
E := 0.8
# Частота вращения винта
n := 60  # об/мин
# Коэффициент уменьшения производительности
# от наклона конвейера
R_β := 0.7
# Определяем необходимый диаметр винта по формуле:
D := 0.275*Q/(E*n*φ*ρ_н*R_β) explicit, ALL → 0.275*0.041/(0.8*60*0.32*2.13*0.7) = 0.00049232  # м
